<?xml version="1.0"?>
<!-- Autopilot Configuration -->
<autopilot name="Ground Vehicle Autopilot">

  <!-- INTERFACE PROPERTIES  -->
  <property> ap/attitude_hold      </property>
  <property> ap/altitude_hold      </property>
  <property> ap/heading_hold       </property>
  <property> ap/velocity_hold      </property>
  <property> ap/acceleration_hold      </property>
  <property> ap/heading_setpoint   </property>
  <property> ap/altitude_setpoint  </property>
  <property> ap/velocity_setpoint  </property>
  <property> ap/acceleration_setpoint  </property>
  <property> fcs/velocity-feedforward  </property>
  <property> ap/aileron_cmd        </property>
  <property> ap/elevator_cmd       </property>
  <property> ap/throttle_cmd       </property>

  <!-- ######################################################################## -->

  <!-- Initial constants (can be overridden in the aircraft file) -->

  <property value="0.524"> guidance/yaw-angle-limit </property>
  <property value="0.174"> guidance/yaw-rate-limit </property>

  <property value="0"> ap/yaw-angle-saturation </property>

  <!-- #################################################################### -->

  <channel name="Heading Hold">
    <switch name="fcs/heading-ap-on-off">
      <default value="-1.0"/>
      <test value="0">
	ap/heading_hold == 1
      </test>
    </switch>

    <!-- HEADING ERROR -->
    <summer name="fcs/heading-error">
      <input> -attitude/psi-rad</input>
      <input> ap/heading_setpoint </input>
    </summer>

    <lag_filter name="Heading error lag">
      <input> fcs/heading-error </input>
      <c1> 15 </c1>
    </lag_filter>

    <switch name="fcs/heading-error-bias-switch">
      <default value="0.0"/>
      <test value="3.1415">
	fcs/heading-error-lag lt -1.5708
      </test>
      <test value="-3.1415">
	fcs/heading-error-lag gt 1.5708
      </test>
    </switch>

    <summer name="fcs/heading-corrected">
      <input> fcs/heading-error-bias-switch </input>
      <input> fcs/heading-error-lag </input>
      <clipto>
	<min> -0.45 </min>
	<max>  0.45 </max>
      </clipto>
    </summer>

    <!-- HEADING SWITCH -->
    <switch name="fcs/heading-error-switch">
      <default value="0.0"/>
      <test value="fcs/heading-corrected">
	ap/heading_hold == 1
      </test>
    </switch>

    <deadband name="fcs/steering-windup-trigger">
      <input> fcs/steer-cmd-norm </input>
      <width>1.0</width>
    </deadband>

    <pid name="fcs/heading-pi-controller">
      <input> fcs/heading-error-switch </input>
      <kp> 0.75 </kp>
      <ki> 0.0 </ki>
      <kd> 0.08 </kd>
      <trigger> fcs/heading-ap-on-off </trigger>
    </pid>

    <switch name="fcs/roll-command-selector">
      <default value="0.0"/>
      <test value="fcs/heading-pi-controller">
	ap/heading_hold == 1
      </test>
      <output>fcs/steer-cmd-norm</output>
    </switch>
  </channel>


  <!-- =============================================================== -->
  <!-- Velocity Modes                                                  -->
  <!-- =============================================================== -->
  <channel name="Velocity hold">
    <summer name="fcs/velocity-error">
      <input> ap/velocity_setpoint </input>
      <input> -velocities/vt-fps </input>
      <clipto>
	<min>-25</min>
	<max> 25</max>
      </clipto>
    </summer>

    <lag_filter name="fcs/vel-error-lag">
      <input> fcs/velocity-error </input>
      <c1> 10 </c1>
    </lag_filter>


    <switch name="fcs/ap-vel-hold-switch">
      <default value="0.0"/>
      <test value="fcs/vel-error-lag">
	ap/velocity_hold == 1
      </test>
    </switch>


    <switch name="fcs/throttle-windup-trigger">
      <default value="0.0"/>
      <test value="-1.0">
	/fdm/jsbsim/external_reactions/engine/magnitude le 0.0
      </test>
      <test value="1.0">
	/fdm/jsbsim/external_reactions/engine/magnitude ge 1700.0
      </test>
    </switch>

    <pid name="fcs/velocity-hold-pid">
      <input> fcs/ap-vel-hold-switch </input>
      <kp> 0.29 </kp>
      <ki> 0.001 </ki>
      <kd> 0.005 </kd>
      <trigger> fcs/throttle-windup-trigger </trigger>
    </pid>

    <fcs_function name = "fcs/velocity-feedforward">
      <function>
	<sum>
	  <property>fcs/velocity-hold-pid</property>
	  <table >
	    <independentVar lookup="row">ap/velocity_setpoint</independentVar>
	    <tableData>
              0.0   0.0     <!-- 0 -->
              49.2   0.44     <!-- 15 -->
              65.0   0.58     <!-- 20 -->
              82.0   0.74     <!-- 25 -->
              88.6   0.86      <!-- 27 -->
              98.4   0.945    <!-- 30 -->
              102.4  1.0     <!-- 34 -->
	    </tableData>
	  </table>
	</sum>
      </function>
      <clipto> <min> 0.0</min>
      <max> 1.0</max> </clipto>
    </fcs_function>

    <switch name="fcs/velocity-ap-autoswitch">
      <default value="0.0"/>
      <test value="fcs/velocity-feedforward">
	ap/velocity_hold == 1
      </test>
    </switch>
  </channel>

  <!--========= ACCELERATION HOLD MODE ===========-->

  <channel name="Acceleration hold">

    <switch name="fcs/acceleration-ap-on-off">
      <default value="-1.0"/>
      <test value="0">
	ap/acceleration_hold == 1
      </test>
    </switch>

    <summer name="fcs/acceleration-error">
      <input> ap/acceleration_setpoint </input>
      <input> -accelerations/udot-ft_sec2 </input>
      <clipto>
	<min>-15</min>
	<max> 15</max>
      </clipto>
    </summer>

    <lag_filter name="fcs/acc-error-lag">
      <input> fcs/acceleration-error </input>
      <c1> 15 </c1>
      <trigger> fcs/acceleration-ap-on-off </trigger>
    </lag_filter>

    <switch name="fcs/ap-acc-hold-switch">
      <default value="0.0"/>
      <test value="fcs/acceleration-error">
	ap/acceleration_hold == 1
      </test>
    </switch>

    <switch name="fcs/throttle-windup-trigger">
      <default value="0.0"/>
      <test value="-1.0">
	ap/throttle_cmd le 0.0
      </test>
      <test value="1.0">
	ap/throttle_cmd ge 1.0
      </test>
      <test value="-1.0">
	velocities/vt-fps le 0.0
      </test>
    </switch>

    <pid name="fcs/acceleration-hold-pid">
      <input> fcs/ap-acc-hold-switch </input>
      <kp> 0.009 </kp>
      <ki> 0.0 </ki>
      <kd> 0.0005 </kd>
      <trigger> fcs/throttle-windup-trigger </trigger>
    </pid>

    <summer name="fcs/acc-throttle-cmd">
      <input> fcs/acceleration-hold-pid </input>
      <input> ap/throttle_cmd </input>
    </summer>

    <switch name="fcs/throttle-command-selector">
      <default value="0.0"/>
      <test value="fcs/velocity-ap-autoswitch">
	ap/velocity_hold == 1
      </test>
      <test value="fcs/acc-throttle-cmd">
	ap/acceleration_hold == 1
      </test>
      <output>ap/throttle_cmd</output>
    </switch>
  </channel>

</autopilot>
