<?xml version="1.0" encoding="utf-8"?>
<!--

  Swedish Navy 20m-class motor torpedo boat "flight" model for JSBSim.

    Copyright (C) 2012 - 2013  Anders Gidenstam  (anders(at)gidenstam.org)

    This program is free software; you can redistribute it and/or modify
    it under the terms of the GNU General Public License as published by
    the Free Software Foundation; either version 2 of the License, or
    (at your option) any later version.

    This program is distributed in the hope that it will be useful,
    but WITHOUT ANY WARRANTY; without even the implied warranty of
    MERCHANTABILITY or FITNESS FOR A PARTICULAR PURPOSE.  See the
    GNU General Public License for more details.

    You should have received a copy of the GNU General Public License
    along with this program; if not, write to the Free Software
    Foundation, Inc., 59 Temple Place, Suite 330, Boston, MA  02111-1307  USA

-->
<piston_engine name="Ford V8-48">
 <documentation>
   Ford V8 Flathead 221 cubic inches petrol engine.

   [BorgenstamNyman:1981:MTB]

   [http://en.wikipedia.org/wiki/Ford_Flathead_engine]
     221 cu in V8-48
 </documentation>

 <displacement unit="IN3"> 221.00   </displacement>
 <bore unit="IN">            3.0625 </bore>
 <stroke unit="IN">          3.75   </stroke>
 <compression-ratio>         6.30   </compression-ratio>

 <cylinders>                8.00  </cylinders>
 <cycles>                   4.00  </cycles>

 <maxhp>                    85.00 </maxhp>

 <idlerpm>                 300.00 </idlerpm>
 <maxrpm>                 2000.00 </maxrpm>

 <!-- bsfc unit="LBS/HP*HR">     0.37 </bsfc -->
 <!-- volumetric_efficiency>          <volumetric_efficiency -->

 <sparkfaildrop>             0.10 </sparkfaildrop>

 <minmp unit="INHG">         12.0 </minmp>
 <maxmp unit="INHG">         28.5 </maxmp>

 <minthrottle> 0.1 </minthrottle>
 <maxthrottle> 1.0 </maxthrottle>

</piston_engine>
