<?xml version="1.0" encoding="utf-8"?>
<!--

  Swedish Navy 20m-class motor torpedo boat "flight" model for JSBSim.

    Copyright (C) 2012 - 2016  Anders Gidenstam  (anders(at)gidenstam.org)

    This program is free software; you can redistribute it and/or modify
    it under the terms of the GNU General Public License as published by
    the Free Software Foundation; either version 2 of the License, or
    (at your option) any later version.

    This program is distributed in the hope that it will be useful,
    but WITHOUT ANY WARRANTY; without even the implied warranty of
    MERCHANTABILITY or FITNESS FOR A PARTICULAR PURPOSE.  See the
    GNU General Public License for more details.

    You should have received a copy of the GNU General Public License
    along with this program; if not, write to the Free Software
    Foundation, Inc., 59 Temple Place, Suite 330, Boston, MA  02111-1307  USA

-->
<propeller name="Swedish Navy 20m MTB propeller (power sink)">

 <documentation>
  This propeller is designed to draw a controllable amount of power
  while producing no thrust.

  The thrust, which in this case is from a marine propeller, is modelled
  and applied separately, see propulsion.xml.

  The following system is used to set the blade angle of this "propeller"
  to draw the amount of power required by the marine propeller from the engine.

  <channel name="main engine">

   <fcs_function name="propulsion/engine[#]/required-power-coefficient">
    <function>
     <max>
      <product>
       <quotient>
        <property>hydro/environment/rho-slug_ft3</property>
        <property>atmosphere/rho-slugs_ft3</property>
       </quotient>
       <property>propulsion/propeller[#]/power-coefficient</property>
      </product>
      <value>0.05</value>
     </max>
    </function>
   </fcs_function>

   <!-- Set the power required from the engine. -->
   <fcs_function name="tmp/blade-angle-deg[#]">
    <function>
     <product>
      <value>0.01</value>
      <property>propulsion/engine[#]/required-power-coefficient</property>
     </product>
    </function>
    <output>propulsion/engine[#]/blade-angle</output>
   </fcs_function>

  </channel>

 </documentation>

 <documentation>
   The intertia is assumed to be
     n * 1/3*m_b*(d^2)/4
   where
     n is the number of blades,
     m_b is the mass of a blade and
     d is the diameter.

   2/3 of the total propeller weight is assumed to be in the blades.
 </documentation>

 <ixx> 33.2 </ixx> <!-- Guess. Lower for the sake of the auxiliary engines? -->
 <diameter unit="M">0.70</diameter>
 <numblades> 3.0 </numblades>
 <gearratio> 1.0 </gearratio> <!-- Don't change. -->

 <!-- The blade angle is used to control the power coefficient. -->
 <minpitch>  0.0 </minpitch>
 <maxpitch> 10.0 </maxpitch>

 <table name="C_THRUST" type="internal">
  <tableData>
           0.0   10.0
   0.000   0.0    0.0
   2.000   0.0    0.0
  </tableData>
 </table>

 <table name="C_POWER" type="internal">
  <tableData>
           0.0   10.0
   0.000   0.0   1000.0
   2.000   0.0   1000.0
  </tableData>
 </table>

</propeller>
